*Heading
** Job name: Demo_Bracket  Model name: Demo
** A small demonstration model shipped with the INP editor.
*Preprint, echo=NO, model=NO, history=NO, contact=NO
**
** PARTS
**
*Part, name=Bracket
*Node
      1,       0.0000,       0.0000,       0.0000
      2,      10.0000,       0.0000,       0.0000
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*Element, type=C3D8R
     1,      1,      2,     11,     10,     46,     47,     56,     55
     2,      2,      3,     12,     11,     47,     48,     57,     56
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*Nset, nset=Set-All, generate
      1,     180,       1
*Elset, elset=Set-All, generate
      1,      96,       1
*Nset, nset=Fixed_End
     1,     10,     19,     28,     37,     46
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*Nset, nset=Loaded_End
     9,     18,     27,     36,     45,     54
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*Elset, elset=Top_Elements
    65,     66,     67,     68,     69,     70
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*Surface, type=ELEMENT, name=Top_Surface
Top_Elements, S6
** Section: Steel_Section
*Solid Section, elset=Set-All, material=Steel
,
*End Part
**
*Part, name=Cover_Plate
*Node
      1,       0.0000,       0.0000,       0.0000
      2,      20.0000,       0.0000,       0.0000
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*Element, type=S4R
     1,      1,      2,      7,      6
     2,      2,      3,      8,      7
     3,      3,      4,      9,      8
     4,      4,      5,     10,      9
     5,      6,      7,     12,     11
     6,      7,      8,     13,     12
     7,      8,      9,     14,     13
     8,      9,     10,     15,     14
*Nset, nset=Plate_All, generate
      1,      15,       1
*Elset, elset=Plate_All, generate
      1,       8,       1
** Section: Plate_Section
*Shell Section, elset=Plate_All, material=Aluminium
2., 5
*End Part
**
** ASSEMBLY
**
*Assembly, name=Assembly
**
*Instance, name=Bracket-1, part=Bracket
*End Instance
**
*Instance, name=Cover_Plate-1, part=Cover_Plate
          0.,          26.,           0.
          0.,          26.,           0.,          1.,          26.,           0.,         -12.
*End Instance
**
*Nset, nset=Fixed_End, instance=Bracket-1
     1,     10,     19,     28,     37,     46
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*Nset, nset=Loaded_End, instance=Bracket-1
     9,     18,     27,     36,     45,     54
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*Elset, elset=Top_Elements, instance=Bracket-1
    65,     66,     67,     68,     69,     70
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*Surface, type=ELEMENT, name=Bracket_Top
Top_Elements, S6
*End Assembly
**
** MATERIALS
**
*Material, name=Steel
*Density
7.85e-09,
*Elastic
210000., 0.3
*Plastic
 250., 0.
 420., 0.15
*Material, name=Aluminium
*Density
2.7e-09,
*Elastic
 70000., 0.33
**
** BOUNDARY CONDITIONS
**
** Name: BC_Encastre Type: Symmetry/Antisymmetry/Encastre
*Boundary
Fixed_End, ENCASTRE
** ----------------------------------------------------------------
**
** STEP: Load_Step
**
*Step, name=Load_Step, nlgeom=YES, inc=100
*Static
0.1, 1., 1e-05, 1.
**
** LOADS
**
** Name: Tip_Load   Type: Concentrated force
*Cload
Loaded_End, 2, -25.
**
** OUTPUT REQUESTS
**
*Restart, write, frequency=0
**
** FIELD OUTPUT: F-Output-1
**
*Output, field, variable=PRESELECT
**
** HISTORY OUTPUT: H-Output-1
**
*Output, history, variable=PRESELECT
*End Step
